<?xml version="1.0"?>
<!-- JSBSim autopilot file was generated by Control System Designer for JSBSim (Tomas Vogeltanz ©2016-) -->
<autopilot name="Autopilot">
<!--Default properties. They can be modified or deleted. Moreover, you may add other properties or even channels.-->
<property>ap/aileron_cmd</property>
<property>ap/elevator_cmd</property>
<property>ap/rudder_cmd</property>
</autopilot>
